! One object of every class with a length-unit property, each unit written
! with a documented word.
Clear
Set DefaultBaseFrequency=60
New Circuit.unitwords basekv=12.47 phases=3 bus1=src
New WireData.w GMRac=0.0244 GMRunits=ft Rac=0.306 Runits=mi Diam=0.721 Radunits=in
New CNData.cn k=13 DiaStrand=0.064 Rstrand=2.816666667 epsR=2.3
~ InsLayer=0.220 DiaIns=1.06 DiaCable=1.16 Rac=0.076705 GMRac=0.20568 diam=0.573
~ Runits=kft Radunits=in GMRunits=in
New TSData.ts diashield=0.85 tapelayer=0.005 epsR=2.3
~ inslayer=0.22 DiaIns=0.78 Rdc=0.184204546 GMRac=0.13320 diam=0.368
~ Runits=kft Radunits=in GMRunits=in
New LineCode.c nphases=3 r1=0.3 x1=0.6 r0=0.3 x0=0.6 units=km
New LineGeometry.g nconds=1 nphases=1 cond=1 wire=w x=0 h=10 units=ft
New LineSpacing.s nconds=3 nphases=3 x=[-4 0 4] h=[28 28 28] units=ft
New Line.l bus1=src.1.2.3 bus2=b.1.2.3 length=1 units=km
