! Load Master Model from Local OpenDSS
Redirect "../../IEEETestCases/LVTestCaseNorthAmerican/Master.dss"

! Load Network Protectors
Redirect "../../IEEETestCases/LVTestCaseNorthAmerican/network_protectors.dss"

! Load Energy Meters
Redirect "../../IEEETestCases/LVTestCaseNorthAmerican/energy_meters.dss"

BatchEdit Relay..* debugtrace=yes
